** ** SECTION DATA
** **
*SOLID SECTION, ELSET=P1;pid1, MATERIAL=Default MATERIAL
*SOLID SECTION, ELSET=P2;pid2, MATERIAL=Default MATERIAL
*SOLID SECTION, ELSET=P3;pid3, MATERIAL=Default MATERIAL
*SOLID SECTION, ELSET=P4;pid4, MATERIAL=Default MATERIAL
**
*NODE
       1,                       1.,                      -1.,                     -10.
       2,                       1.,                      -2.,                     -10.
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**
** SOLID ELEMENTS
**
*ELEMENT, TYPE=C3D4, ELSET=P1;pid1
       1,      112,       64,       63,      113
       2,      112,      152,       64,      113
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*ELEMENT, TYPE=C3D4, ELSET=P2;pid2
     145,       27,       12,       11,       28
     146,       27,       50,       12,       28
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*ELEMENT, TYPE=C3D4, ELSET=P3;pid3
     289,      173,      254,      253,      174
     290,      173,      172,      254,      174
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*ELEMENT, TYPE=C3D4, ELSET=P4;pid4
     433,      100,      210,      212,      208
     434,      100,      210,      132,      131
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** **
** **
** **
** **
** **
** **
** **
** **
** ** MATERIALS
** **
** **
** **Default MATERIAL
** **
*MATERIAL, NAME=Default MATERIAL
*DENSITY
                 7.85E-6,
*ELASTIC, TYPE=ISOTROPIC
                    210.,                      0.3
**
**
**
